K09-L as designed (B1 verification) - team/B1/vlm_xfoil.py
0.0
0 0 0.0
0.36800 0.32000 1.15000
0.05359 0.0 0.0180
0.0
#
SURFACE
Wing
8 1.0
YDUPLICATE
0.0
SECTION
0.0 0.00000 0.0 0.32000 0.0  2 1.0
AFILE
s5010.dat
SECTION
0.0 0.07000 0.0 0.32000 0.0  8 1.0
AFILE
s5010.dat
CONTROL
elevator 0.6060 0.7800 0 0 0 1.0
SECTION
0.0 0.30000 0.0 0.32000 0.0  1 1.0
AFILE
s5010.dat
CONTROL
elevator 0.6060 0.7800 0 0 0 1.0
SECTION
0.0 0.32000 0.0 0.32000 0.0  1 1.0
AFILE
s5010.dat
SECTION
0.0 0.34000 0.0 0.32000 0.0  8 1.0
AFILE
s5010.dat
CONTROL
elevator 0.6060 0.7800 0 0 0 1.0
SECTION
0.0 0.56000 0.0 0.32000 0.0  1 1.0
AFILE
s5010.dat
CONTROL
elevator 0.6060 0.7800 0 0 0 1.0
SECTION
0.0 0.57500 0.0 0.32000 0.0
AFILE
s5010.dat
#
SURFACE
Fin
6 1.0 8 1.0
YDUPLICATE
0.0
SECTION
0.0450 0.3200 -0.2100 0.2750 0.0
SECTION
0.0450 0.3200 0.2100 0.2750 0.0
