K09-L wing + fins (mh45, eta 0.587, twist +0.0 deg, fins True) - team/B2/avl_wing.py
0.0
0 0 0.0
0.34500 0.30000 1.15000
0.06000 0.0 0.0
0.0
#
SURFACE
Wing
8 1.0
YDUPLICATE
0.0
CDCL
-0.2000 0.00957 0.4500 0.00821 1.1000 0.01936
SECTION
0.00000 0.00000 0.0 0.30000 0.0000  1 1.0
AFILE
mh45.dat
SECTION
0.00000 0.05000 0.0 0.30000 0.0000  1 1.0
AFILE
mh45.dat
SECTION
0.00000 0.07000 0.0 0.30000 0.0000  6 1.0
AFILE
mh45.dat
CONTROL
elevator 0.5873 0.7800 0 0 0 1.0
CONTROL
aileron 0.5873 0.7800 0 0 0 -1.0
SECTION
0.00000 0.30000 0.0 0.30000 0.0000  1 1.0
AFILE
mh45.dat
CONTROL
elevator 0.5873 0.7800 0 0 0 1.0
CONTROL
aileron 0.5873 0.7800 0 0 0 -1.0
SECTION
0.00000 0.32000 0.0 0.30000 0.0000  1 1.0
AFILE
mh45.dat
SECTION
0.00000 0.34000 0.0 0.30000 0.0000  6 1.0
AFILE
mh45.dat
CONTROL
elevator 0.5873 0.7800 0 0 0 1.0
CONTROL
aileron 0.5873 0.7800 0 0 0 -1.0
SECTION
0.00000 0.56000 0.0 0.30000 0.0000  1 1.0
AFILE
mh45.dat
CONTROL
elevator 0.5873 0.7800 0 0 0 1.0
CONTROL
aileron 0.5873 0.7800 0 0 0 -1.0
SECTION
0.00000 0.57500 0.0 0.30000 0.0000
AFILE
mh45.dat
#
SURFACE
Fin
6 1.0 8 0.0
YDUPLICATE
0.0
SECTION
-0.1000 0.3200 -0.1900 0.4000 0.0
SECTION
-0.1000 0.3200 0.1900 0.4000 0.0
