K09-L wing + fins (s5010, eta 0.606, twist +0.0 deg, fins True) - team/B2/avl_wing.py
0.0
0 0 0.0
0.36800 0.32000 1.15000
0.05780 0.0 0.0
0.0
#
SURFACE
Wing
16 1.0
YDUPLICATE
0.0
CDCL
-0.2000 0.01245 0.4500 0.00808 1.1000 0.01595
SECTION
0.00000 0.00000 0.0 0.32000 0.0000  3 1.0
AFILE
s5010.dat
SECTION
0.00000 0.07000 0.0 0.32000 0.0000  14 1.0
AFILE
s5010.dat
CONTROL
elevator 0.6063 0.7800 0 0 0 1.0
CONTROL
aileron 0.6063 0.7800 0 0 0 -1.0
SECTION
0.00000 0.30000 0.0 0.32000 0.0000  1 1.0
AFILE
s5010.dat
CONTROL
elevator 0.6063 0.7800 0 0 0 1.0
CONTROL
aileron 0.6063 0.7800 0 0 0 -1.0
SECTION
0.00000 0.32000 0.0 0.32000 0.0000  1 1.0
AFILE
s5010.dat
SECTION
0.00000 0.34000 0.0 0.32000 0.0000  14 1.0
AFILE
s5010.dat
CONTROL
elevator 0.6063 0.7800 0 0 0 1.0
CONTROL
aileron 0.6063 0.7800 0 0 0 -1.0
SECTION
0.00000 0.56000 0.0 0.32000 0.0000  1 1.0
AFILE
s5010.dat
CONTROL
elevator 0.6063 0.7800 0 0 0 1.0
CONTROL
aileron 0.6063 0.7800 0 0 0 -1.0
SECTION
0.00000 0.57500 0.0 0.32000 0.0000
AFILE
s5010.dat
#
SURFACE
Fin
12 1.0 16 0.0
YDUPLICATE
0.0
SECTION
0.0450 0.3200 -0.2100 0.2750 0.0
SECTION
0.0450 0.3200 0.2100 0.2750 0.0
