K09-L quad tailsitter, B3 (team/B3/avl_model.py), lattice fine
0.0                     | Mach
0 0 0.0                 | iYsym iZsym Zsym
0.36800 0.32000 1.15000   | Sref Cref Bref
0.05258 0.0 0.01683   | Xref Yref Zref = CG
0.0                     | CDp (not used: AVL gives induced drag only)
#
SURFACE
Wing
16 1.0
YDUPLICATE
0.0
ANGLE
0.0
SECTION
0.0 0.00000 0.0 0.32000 0.0  8 1.0
AFILE
s5010.dat
SECTION
0.0 0.06800 0.0 0.32000 0.0  1 1.0
AFILE
s5010.dat
SECTION
0.0 0.07000 0.0 0.32000 0.0  29 1.0
AFILE
s5010.dat
CONTROL
elevator 1.0000 0.7800 0 0 0 1.0
CONTROL
aileron 1.0000 0.7800 0 0 0 -1.0
SECTION
0.0 0.30000 0.0 0.32000 0.0  1 1.0
AFILE
s5010.dat
CONTROL
elevator 1.0000 0.7800 0 0 0 1.0
CONTROL
aileron 1.0000 0.7800 0 0 0 -1.0
SECTION
0.0 0.30200 0.0 0.32000 0.0  2 1.0
AFILE
s5010.dat
SECTION
0.0 0.32000 0.0 0.32000 0.0  2 1.0
AFILE
s5010.dat
SECTION
0.0 0.33800 0.0 0.32000 0.0  1 1.0
AFILE
s5010.dat
SECTION
0.0 0.34000 0.0 0.32000 0.0  28 1.0
AFILE
s5010.dat
CONTROL
elevator 1.0000 0.7800 0 0 0 1.0
CONTROL
aileron 1.0000 0.7800 0 0 0 -1.0
SECTION
0.0 0.56000 0.0 0.32000 0.0  1 1.0
AFILE
s5010.dat
CONTROL
elevator 1.0000 0.7800 0 0 0 1.0
CONTROL
aileron 1.0000 0.7800 0 0 0 -1.0
SECTION
0.0 0.56200 0.0 0.32000 0.0  2 1.0
AFILE
s5010.dat
SECTION
0.0 0.57500 0.0 0.32000 0.0  1 1.0
AFILE
s5010.dat
#
SURFACE
Fin
14 1.0
YDUPLICATE
0.0
SECTION
0.04500 0.32000 -0.19000 0.27500 0.0  24 1.0
SECTION
0.04500 0.32000 0.00000 0.27500 0.0  24 1.0
SECTION
0.04500 0.32000 0.19000 0.27500 0.0  24 1.0
